/clear,all
/prep7

! === Параметры балки ===
L = 100         ! Длина балки, мм
H = 10          ! Высота балки, мм
B = 10          ! Ширина балки, мм
F = 1000        ! Сила на конце, Н

! === Свойства материала (сталь) ===
MP,EX,1,2.1e5   ! Модуль Юнга, МПа
MP,PRXY,1,0.3   ! Коэффициент Пуассона

! === Создание прямоугольного поперечного сечения ===
BLC4,0,0,L,B    ! Прямоугольник длины L и ширины B

! === Сеточная дискретизация ===
ET,1,SOLID185   ! Тип конечного элемента
KEYOPT,1,3,3    ! Планарное напряжённое состояние (если нужно)
ESIZE,5         ! Размер элемента
VSEL,ALL
VMESH,ALL

! === Граничные условия ===
NSEL,S,LOC,X,0     ! Выбор узлов на левом конце балки
D,ALL,ALL          ! Жёсткое закрепление всех степеней свободы

! === Нагрузка ===
NSEL,S,LOC,X,L     ! Выбор узлов на правом конце балки
F,ALL,FY,-F        ! Прикладываем силу вниз

! === Запуск расчёта ===
/SOLU
ANTYPE,0           ! Статический анализ
SOLVE
FINISH

! === Постпроцессинг ===
/POST1
SET,LAST
PLDISP,2           ! Отображение деформаций

FINISH
